P_2 := 7.25*10^6
P_а := 0.02*10^6
# 3. Построение газодинамического тракта
I_уп := 3609.98
P_п := 700
F`_кр := 0.0002523
F`_а := 0.0099085
m_р := P_п*10^3/I_уп = 193.907
φ_с := 0.98
F_кр := F`_кр*m_р = 0.0489227
φ_β := 0.98
F_крд := F_кр/φ_с = 0.0499211
φ := φ_с*φ_β = 0.9604
F_а := F`_а*m_р = 1.92133
F_ад := F_а/φ_с^2 = 2.00055
L_пр := 1.5
V_кс := L_пр*F_крд = 0.0748817
d_кс := nthroot(4*V_кс/π, 3) = 0.456838
L_кс := d_кс = 0.456838
R_кр := sqrt(F_крд/π) = 0.126057
D_кр := 2*R_кр = 0.252114
R_а := sqrt(F_ад/π) = 0.797994
R_а*2 = 1.59599
R_с1 := 0.25*d_кс = 0.114209
R_с2 := 0.7*D_кр = 0.17648
R_с3 := 0.45*R_кр = 0.0567257
R_а/R_кр = 6.33042
L_a := 15.5*R_кр = 1.95388
# 5. Расчет смесительной головки
ρ_о := 1135
ρ_г := 416
υ := 3.5504
m_г := m_р/(1 + υ) = 42.6132
m_о := m_р*υ/(1 + υ) = 151.294
# 5.2 Расчет струйных форсунок для пристеночного слоя.
d_кс = 0.456838
ρ_г = 416
m_г = 42.6132
Δp_фг := 1.5*10^6
n_сф := π*(d_кс - 0.016)/0.015 = 92.3288
μ_ф := 0.65
m_сфг := 0.05*m_г/n_сф = 0.0230768
F_сфг := m_сфг/(μ_ф*sqrt(2*Δp_фг*ρ_г)) = 1.00498e-6
ω_г := μ_ф*sqrt(2*Δp_фг/ρ_г) = 55.1985
d_сфг := sqrt(4*F_сфг/π) = 0.00113118
# 5.3 Расчет центробежных форсунок
# 5.3.1. Форсунки горючего
n_цфг := 187
m_цфг := 0.95*m_г/n_цфг = 0.216484
Δp_ф := 2*10^6
μ_ф := 0.42
F_сг := m_цфг/(μ_ф*sqrt(2*Δp_ф*ρ_г)) = 1.26357e-5
A := 1
d_сг := sqrt(4*F_сг/π) = 0.00401102
r_сг := d_сг/2 = 0.00200551
i := 4
R_вх := 2*r_сг = 0.00401102
m_вх := m_цфг/i = 0.054121
Динамическая
r_вх := round(sqrt(R_вх*r_сг/(i*A)), 4) = 0.0014
вязкость
d_вх := 2*r_вх = 0.0028
η := 102.8*10^-6
Re_вх := 4*m_цфг/(η*π*d_вх*sqrt(i)) = 478801
Для_правильной_работы_маткада
lg(λ) := 25.8/log(Re_вх)^2.58 - 2 = -1.70801
λ := 0
λ := 10^lg(λ) = 0.0195881
log(0.02) = -1.69897
A_э := R_вх*r_сг/(i*r_вх^2 + λ/2*R_вх*(R_вх - r_сг)) = 1.01583
|(A - A_э)/A|*100 = 1.58306
l_вх := 1.2*d_вх = 0.00336
l_сг := 0.5*d_сг = 0.00200551
h := R_вх = 0.00401102
R_з := R_вх + r_вх = 0.00541102
R_ф := sqrt(R_з^2 + l_вх^2 + 2*l_вх*sqrt(R_з^2 - R_вх^2)) = 0.00806072
δ := R_ф - R_з = 0.0026497
# 5.3.2. Форсунки окислителя
n_цфо := 424
m_цфо := m_г/n_цфг = 0.227878
m_цфо = 0.227878
ρ_о = 1135
Δp_ф := 2*10^6
μ_ф := 0.42
F_со := m_цфо/(μ_ф*sqrt(2*Δp_ф*ρ_о)) = 8.05239e-6
A := 1
d_со := round(sqrt(4*F_со/π), 3) = 0.003
r_со := d_со/2 = 0.0015
i := 3
R_вх := 2*r_со = 0.003
m_вх := m_цфо/i = 0.0759593
Динамическая
r_вх := round(sqrt(R_вх*r_со/(i*A)), 4) = 0.0012
вязкость
d_вх := 2*r_вх = 0.0024
η := 190*10^-6
Re_вх := 4*m_цфо/(η*π*d_вх*sqrt(i)) = 367356
Для_правильной_работы_маткада
lg(λ) := 25.8/log(Re_вх)^2.58 - 2 = -1.69218
λ := 0
λ := 10^lg(λ) = 0.0203153
A_э := R_вх*r_со/(i*r_вх^2 + λ/2*R_вх*(R_вх - r_со)) = 1.03076
|(A - A_э)/A|*100 = 3.07603
l_вх := 1.2*d_вх = 0.00288
l_со := 0.5*d_со = 0.0015
h := R_вх = 0.003
R_з := R_вх + r_вх = 0.0042
R_ф := sqrt(R_з^2 + l_вх^2 + 2*l_вх*sqrt(R_з^2 - R_вх^2)) = 0.00654716
δ := R_ф - R_з = 0.00234716
# 6. Расчет турбонасосного агрегата
ΔP_охл := 0.5*10^6
ΔP_ф := 2*10^6
P_подг := P_2 + ΔP_охл + ΔP_ф = 9750000
P_подо := P_2 + ΔP_ф = 9250000
P_нд := 0.2*10^6
P_вх := P_нд = 200000
P_sг := 10^5
P_sо := 10^5
# 6.1 Расчет насосов
Q_г := m_г/ρ_г = 0.102435
H_г := (P_подг - P_вх)/ρ_г = 22956.7
c_кр := 3000
ω_maxг := c_кр*((P_вх - P_sг)/ρ_г)^(3/4)/(298*sqrt(Q_г)) = 1920.26
Q_о := m_о/ρ_о = 0.133298
H_о := (P_подо - P_вх)/ρ_о = 7973.57
ω_maxо := c_кр*((P_вх - P_sо)/ρ_о)^(3/4)/(298*sqrt(Q_о)) = 792.95
ω_о := 0.95*ω_maxо = 753.302
ω_г := 0.95*ω_maxг = 1824.25
ω_min := ω_о
ω := ω_min = 753.302
n_sг := 193.3*ω*sqrt(Q_г)/H_г^(3/4) = 24.9887
n_sо := 193.3*ω*sqrt(Q_о)/H_о^(3/4) = 63.0049
η_о := 0.9
η_г := 0.7
η_м := 0.85
η_н := η_о*η_г*η_м = 0.5355
N_нг := Q_г*H_г*ρ_г/η_н = 1826814
M_кр1 := N_нг/ω = 2425.07
N_но := Q_о*H_о*ρ_о/η_о = 1340390
M_кр2 := N_но/ω = 1779.35
M_кр := M_кр1 + M_кр2 = 4204.43
τ := 9.4*10^8
d_в := nthroot(5.1*M_кр/τ, 3) = 0.0283607
d_вт := 1.2*d_в = 0.0340328
# 6.2. Расчет насоса горючего
Q_од := Q_г/η_о = 0.113817
k_о := 5
D_1э := 0.47*k_о*nthroot(Q_од/ω, 3) = 0.125164
D_о := sqrt(D_1э^2 + d_вт^2) = 0.129709
D_1 := D_о = 0.129709
c_о := Q_од/(π/4*D_1э^2) = 9.25031
b_1 := 0.375*D_1э^2/D_1 = 0.0452922
u_1 := D_1*ω/2 = 48.8549
ψ_1 := 0.85
Здесь_надо_варировать  # ψ_1
δ_1 := 0.003
чтобы_была_близка_к_конечной
z := 6
c_1m := Q_од/(π*D_1*b_1*ψ_1) = 7.25515
β_1 := atan(c_1m/u_1) = 0.147426
β_1 = 8.44691°
Δβ_л := 15° = 0.261799
β_1л := β_1 + Δβ_л = 23.4469°
β_1л = 0.409226
ψ_1 := 1 - δ_1*z/(π*D_1*sin(β_1л)) = 0.888985
c_1m := Q_од/(π*D_1*b_1*ψ_1) = 6.93698
Δβ_л := 15° = 0.261799
β_1 := atan(c_1m/u_1) = 0.141049
β_1 = 8.08149°
β_1л := β_1 + Δβ_л = 0.402848
β_1л = 23.0815°
k_н := 0.5
u_2 := sqrt(H_г/(k_н*η_г)) = 256.107
D_2' := 2*u_2/ω = 0.679958
β_2 := 60°
z := 6.5*(D_2' + D_1)/(D_2' - D_1)*sin((β_1л + β_2)/2) = 6.34269
z := round(z) = 6
c_2m := c_1m
ψ_2 := 1 - δ_1*z/(π*D_2'*sin(β_2)) = 0.99027
b_2 := Q_од/(π*D_2'*c_2m*ψ_2) = 0.00775625
ψ := 0.6 + 0.6*sin(β_2) = 1.11962
p := 2*ψ/z*1/(1 - (D_1/D_2')^2) = 0.387299
H_T∞ := H_г/η_г*(1 + p) = 45496.9
u_2 := c_2m/(2*tan(β_2)) + sqrt((c_2m/(2*tan(β_2)))^2 + H_T∞) = 215.312
D_21' := 2*u_2/ω = 0.571649
γ := |(D_21' - D_2')/D_21'|*100 = 18.9468
z := 6.5*(D_21' + D_1)/(D_21' - D_1)*sin((β_1л + β_2)/2) = 6.84074
z := round(z) = 7
ψ_2 := 1 - δ_1*z/(π*D_21'*sin(β_2)) = 0.986498
b_2 := Q_од/(π*D_21'*c_2m*ψ_2) = 0.00926109
ψ := 0.6 + 0.6*sin(β_2) = 1.11962
p := 2*ψ/z*1/(1 - (D_1/D_21')^2) = 0.337254
H_T∞ := H_г/η_г*(1 + p) = 43855.7
u_2 := c_2m/(2*tan(β_2)) + sqrt((c_2m/(2*tan(β_2)))^2 + H_T∞) = 211.43
D_22' := 2*u_2/ω = 0.561341
γ := |(D_22' - D_21')/D_22'|*100 = 1.83628
# 6.3 Расчет насоса горючего
Q_од := Q_о/η_о = 0.148109
k_о := 5
D_1э := 0.47*k_о*nthroot(Q_од/ω, 3) = 0.136649
D_о := sqrt(D_1э^2 + d_вт^2) = 0.140823
D_1 := D_о = 0.140823
c_о := Q_од/(π/4*D_1э^2) = 10.0991
b_1 := 0.375*D_1э^2/D_1 = 0.0497243
u_1 := D_1*ω/2 = 53.0411
ψ_1 := 0.85
Здесь_надо_варировать  # ψ_1
δ_1 := 0.003
чтобы_была_близка_к_конечной
z := 6
c_1m := Q_од/(π*D_1*b_1*ψ_1) = 7.92084
β_1 := atan(c_1m/u_1) = 0.148238
β_1 = 8.49344°
Δβ_л := 15° = 0.261799
β_1л := β_1 + Δβ_л = 23.4934°
β_1л = 0.410038
ψ_1 := 1 - δ_1*z/(π*D_1*sin(β_1л)) = 0.897938
c_1m := Q_од/(π*D_1*b_1*ψ_1) = 7.49797
Δβ_л := 15° = 0.261799
β_1 := atan(c_1m/u_1) = 0.140431
β_1 = 8.0461°
β_1л := β_1 + Δβ_л = 0.40223
β_1л = 23.0461°
k_н := 0.5
u_2 := sqrt(H_о/(k_н*η_о)) = 133.113
D_2' := 2*u_2/ω = 0.353412
β_2 := 30°
z := 6.5*(D_2' + D_1)/(D_2' - D_1)*sin((β_1л + β_2)/2) = 6.74814
z := round(z) = 7
c_2m := c_1m
ψ_2 := 1 - δ_1*z/(π*D_2'*sin(β_2)) = 0.962172
b_2 := Q_од/(π*D_2'*c_2m*ψ_2) = 0.0184908
ψ := 0.6 + 0.6*sin(β_2) = 0.9
p := 2*ψ/z*1/(1 - (D_1/D_2')^2) = 0.305677
H_T∞ := H_о/η_о*(1 + p) = 11567.7
u_2 := c_2m/(2*tan(β_2)) + sqrt((c_2m/(2*tan(β_2)))^2 + H_T∞) = 114.242
D_21' := 2*u_2/ω = 0.303311
γ := |(D_21' - D_2')/D_21'|*100 = 16.5179
z := 6.5*(D_21' + D_1)/(D_21' - D_1)*sin((β_1л + β_2)/2) = 7.93385
z := round(z) = 8
ψ_2 := 1 - δ_1*z/(π*D_21'*sin(β_2)) = 0.949626
b_2 := Q_од/(π*D_21'*c_2m*ψ_2) = 0.0218297
ψ := 0.6 + 0.6*sin(β_2) = 0.9
p := 2*ψ/z*1/(1 - (D_1/D_21')^2) = 0.286829
H_T∞ := H_о/η_о*(1 + p) = 11400.7
u_2 := c_2m/(2*tan(β_2)) + sqrt((c_2m/(2*tan(β_2)))^2 + H_T∞) = 113.465
D_22' := 2*u_2/ω = 0.301246
γ := |(D_22' - D_21')/D_22'|*100 = 0.685388
# 7. ЖГГ, Турбина ТНА
N_нг = 1826814
N_но = 1340390
N_т := N_нг + N_но = 3167204
Т_гг := 1200.02
p_вхд := 7.25*10^6
p_вых := 6.894*10^6
R := 624.552
γ := 1.14698
L_ад := γ/(γ - 1)*R*Т_гг*(1 - (p_вых/p_вхд)^(γ/(γ - 1))) = 1900298
c_ад := sqrt(2*L_ад) = 1949.51
u := 0.2*c_ад = 389.902
ω = 753.302
r := u/ω = 0.517591
d := 2*r = 1.03518
η_т := 0.425
m_гг := N_т/(L_ад*η_т) = 3.92162
ν_гг := 0.7584
m_огг := ν_гг*m_гг/(1 + ν_гг) = 1.6914
m_ггг := 1*m_гг/(1 + ν_гг) = 2.23022
m_огг + m_ггг = 3.92162
# 8. Построение высотной и дроссельной характеристик ЖРД
β := 1828.92
P_п = 700
P_2 = 7250000
K_п := P_п*10^3/(F_крд*P_2) = 1.93409
P_н := 0.10132
P_з(m) := K_п*β*m - F_ад*P_н*10^6
K_п*β = 3537.29
F_ад*P_н*10^6 = 202696
P_пп(m) := K_п*β*m
m_р = 193.907
m_min := 0.18*P_н*10^6*F_кр*P_2/(β*P_а) = 176.844
# Дроссельная характеристика
# [plot: P_з(m), P_пп(m) vs m]
# P | -P_з(m)  -P_пп(m)
m
# [Excel component]
    H := excel["A2:A31"]
    p := excel["B2:B31"]
P_п = 700
F_ад = 2.00055
P := P_п*10^3 - p*F_ад
max(P) = 700000
# [plot: P vs H]
P
H
